# OpenSim document version 30000
ExternalLoads Ex2:
  lowpass_cutoff_frequency_for_load_kinematics: 6
  ExternalForce ExternalForce_1: applied_to_body=calcn_r force_expressed_in_body=ground point_expressed_in_body=ground
      force_identifier=ground_force1_v point_identifier=ground_force1_p torque_identifier=ground_torque1_
  ExternalForce ExternalForce_4: applied_to_body=calcn_r force_expressed_in_body=ground point_expressed_in_body=ground
      force_identifier=ground_force4_v point_identifier=ground_force4_p torque_identifier=ground_torque4_
  ExternalForce ExternalForce_2: applied_to_body=calcn_l force_expressed_in_body=ground point_expressed_in_body=ground
      force_identifier=ground_force2_v point_identifier=ground_force2_p torque_identifier=ground_torque2_
