# OpenSim document version 30000
InverseKinematicsTool:
  results_directory: ./
  constraint_weight: Inf
  accuracy: 1e-5
  marker_file: ../../../MOtoNMS-2.1/TestData/ElaboratedData/UMGsubject/2013-07-11/dynamicElaborations/testManual/Walking2/Walking2.trc
  time_range: 2.875 4.83333
  report_errors: true
  report_marker_locations: false
  IKTaskSet:
    IKMarkerTask C7: apply=true weight=1
    IKMarkerTask RA: apply=true weight=1
    IKMarkerTask RASIS: apply=true weight=1
    IKMarkerTask LPSIS: apply=true weight=1
    IKMarkerTask LA: apply=true weight=1
    IKMarkerTask LASIS: apply=true weight=1
    IKMarkerTask RPSIS: apply=true weight=1
    IKMarkerTask T10: apply=true weight=1
    IKMarkerTask RLE: apply=true weight=1
    IKMarkerTask RME: apply=true weight=1
    IKMarkerTask LME: apply=true weight=1
    IKMarkerTask LLE: apply=true weight=1
    IKMarkerTask RLM: apply=true weight=1
    IKMarkerTask RMM: apply=true weight=1
    IKMarkerTask LMM: apply=true weight=1
    IKMarkerTask LLM: apply=true weight=1
    IKMarkerTask RCA: apply=true weight=1
    IKMarkerTask LCA: apply=true weight=1
    IKMarkerTask RIMH: apply=true weight=1
    IKMarkerTask RVMH: apply=true weight=1
    IKMarkerTask LIMH: apply=true weight=1
    IKMarkerTask LVMH: apply=true weight=1
    IKMarkerTask RKJC: apply=false weight=1
    IKMarkerTask LKJC: apply=false weight=1
    IKMarkerTask RAJC: apply=false weight=1
    IKMarkerTask LAJC: apply=false weight=1
    IKMarkerTask CLAV: apply=true weight=1
    IKMarkerTask RT1: apply=true weight=1
    IKMarkerTask RT3: apply=true weight=1
    IKMarkerTask RT2: apply=true weight=1
    IKMarkerTask RT4: apply=true weight=1
    IKMarkerTask RS1: apply=true weight=1
    IKMarkerTask RS3: apply=true weight=1
    IKMarkerTask RS2: apply=true weight=1
    IKMarkerTask RS4: apply=true weight=1
    IKMarkerTask LT1: apply=true weight=1
    IKMarkerTask LT3: apply=true weight=1
    IKMarkerTask LT2: apply=true weight=1
    IKMarkerTask LT4: apply=true weight=1
    IKMarkerTask LS2: apply=true weight=1
    IKMarkerTask LS3: apply=true weight=1
    IKMarkerTask LS4: apply=true weight=1
    IKMarkerTask LS1: apply=true weight=1
