# OpenSim document version 30000
InverseKinematicsTool:
  results_directory: ./
  constraint_weight: Inf
  accuracy: 1e-5
  marker_file: ../../../MOtoNMS-2.1/TestData/ElaboratedData/UWAsubject/2010-05-11/dynamicElaborations/testWindowFromC3D/CrossOvers1/CrossOvers1.trc
  time_range: 2.66 3.064
  report_errors: true
  report_marker_locations: false
  IKTaskSet:
    IKMarkerTask RACR: apply=true weight=1
    IKMarkerTask LACR: apply=true weight=1
    IKMarkerTask C7: apply=true weight=1
    IKMarkerTask CLAV: apply=true weight=1
    IKMarkerTask RASI: apply=true weight=1
    IKMarkerTask LASI: apply=true weight=1
    IKMarkerTask SACR: apply=true weight=1
    IKMarkerTask LHJC: apply=false weight=1
    IKMarkerTask RHJC: apply=false weight=1
    IKMarkerTask RTH1: apply=true weight=1
    IKMarkerTask RTH2: apply=true weight=1
    IKMarkerTask RTH3: apply=true weight=1
    IKMarkerTask RKJC: apply=false weight=1
    IKMarkerTask RTB1: apply=true weight=1
    IKMarkerTask RTB2: apply=true weight=1
    IKMarkerTask RTB3: apply=true weight=1
    IKMarkerTask RAJC: apply=false weight=1
    IKMarkerTask RCAL: apply=true weight=1
    IKMarkerTask RMT1: apply=true weight=1
    IKMarkerTask RMT5: apply=true weight=1
    IKMarkerTask LTH1: apply=true weight=1
    IKMarkerTask LTH2: apply=true weight=1
    IKMarkerTask LTH3: apply=true weight=1
    IKMarkerTask LKJC: apply=false weight=1
    IKMarkerTask LTB1: apply=true weight=1
    IKMarkerTask LTB2: apply=true weight=1
    IKMarkerTask LTB3: apply=true weight=1
    IKMarkerTask LAJC: apply=false weight=1
    IKMarkerTask LCAL: apply=true weight=1
    IKMarkerTask LMT1: apply=true weight=1
    IKMarkerTask LMT5: apply=true weight=1
