# OpenSim document version 30000
InverseKinematicsTool:
  results_directory: ./
  constraint_weight: Inf
  accuracy: 1e-5
  marker_file: Squat1.trc
  time_range: 3.43 7.09
  report_errors: true
  output_motion_file: Squat1_ik.mot
  report_marker_locations: false
  IKTaskSet:
    IKMarkerTask RSHO: apply=true weight=1
    IKMarkerTask LSHO: apply=true weight=1
    IKMarkerTask C7: apply=true weight=1
    IKMarkerTask CLAV: apply=true weight=1
    IKMarkerTask RBAK: apply=true weight=1
    IKMarkerTask RUPA: apply=true weight=1
    IKMarkerTask RELB: apply=true weight=1
    IKMarkerTask RFRA: apply=true weight=1
    IKMarkerTask RWRA: apply=true weight=1
    IKMarkerTask RWRB: apply=true weight=1
    IKMarkerTask LUPA: apply=true weight=1
    IKMarkerTask LELB: apply=true weight=1
    IKMarkerTask LFRA: apply=true weight=1
    IKMarkerTask LWRA: apply=true weight=1
    IKMarkerTask LWRB: apply=true weight=1
    IKMarkerTask RASI: apply=true weight=1
    IKMarkerTask LASI: apply=true weight=1
    IKMarkerTask RPSI: apply=true weight=1
    IKMarkerTask LPSI: apply=true weight=1
    IKMarkerTask LHJC: apply=true weight=1
    IKMarkerTask RHJC: apply=true weight=1
    IKMarkerTask RTHI: apply=true weight=1
    IKMarkerTask RLKN: apply=true weight=1
    IKMarkerTask RMKN: apply=true weight=1
    IKMarkerTask RKJC: apply=true weight=1
    IKMarkerTask RTIB: apply=true weight=1
    IKMarkerTask RLAN: apply=true weight=1
    IKMarkerTask RMAN: apply=true weight=1
    IKMarkerTask RAJC: apply=true weight=1
    IKMarkerTask RHEE: apply=true weight=1
    IKMarkerTask RTOE: apply=true weight=1
    IKMarkerTask LTHI: apply=true weight=1
    IKMarkerTask LLKN: apply=true weight=1
    IKMarkerTask LMKN: apply=true weight=1
    IKMarkerTask LKJC: apply=true weight=1
    IKMarkerTask LTIB: apply=true weight=1
    IKMarkerTask LLAN: apply=true weight=1
    IKMarkerTask LMAN: apply=true weight=1
    IKMarkerTask LAJC: apply=true weight=1
    IKMarkerTask LHEE: apply=true weight=1
    IKMarkerTask LTOE: apply=true weight=1
    IKMarkerTask STRN: apply=true weight=1
    IKMarkerTask RLAS: apply=true weight=1
    IKMarkerTask LLAS: apply=true weight=1
    IKMarkerTask T10: apply=true weight=1
    IKMarkerTask LFHD: apply=true weight=1
    IKMarkerTask RBHD: apply=true weight=1
    IKMarkerTask LBHD: apply=true weight=1
    IKMarkerTask RFHD: apply=true weight=1
    IKMarkerTask LFIN: apply=true weight=1
    IKMarkerTask RFIN: apply=true weight=1
