# OpenSim document version 20302
AnalyzeTool:
  replace_force_set: false
  output_precision: 8
  initial_time: 0
  final_time: 0
  solve_for_equilibrium_for_auxiliary_states: false
  maximum_number_of_integrator_steps: 20000
  maximum_integrator_step_size: 1
  minimum_integrator_step_size: 1e-8
  integrator_error_tolerance: 1e-5
  lowpass_cutoff_frequency_for_coordinates: 6
  AnalysisSet Analyses:
    JointReaction: start_time=0 end_time=0 step_interval=1 in_degrees=true joint_names=ALL apply_on_bodies=ALL
        express_in_frame=ALL
